@DSL DefaultGenericBehaviour;
@Behaviour StationaryHeatTransfer;
@Author Thomas Helfer;
@Date 15/02/2019;


@Gradient TemperatureGradient ∇T;
∇T.setGlossaryName("TemperatureGradient");

@Flux HeatFlux j;
j.setGlossaryName("HeatFlux");

@AdditionalTangentOperatorBlock ∂j∕∂ΔT;

@Parameter A = 0.0375;
@Parameter B = 2.165e-4;

@LocalVariable thermalconductivity k;

@Integrator{
  // temperature at the end of the time step
  const auto T_ = T + ΔT;
  // thermal conductivity
  k = 1 / (A + B ⋅ T_);
  // heat flux
  j = -k ⋅ (∇T + Δ∇T);
} // end of @Integrator

@TangentOperator {
  ∂j∕∂Δ∇T = -k ⋅ tmatrix<N, N, real>::Id();
  ∂j∕∂ΔT  =  B ⋅ k ⋅ k ⋅ (∇T + Δ∇T);
} // end of @TangentOperator
